# OpenSim document version 40000
Model:
  gravity: 0 -9.80665 0
  length_units: meters
  force_units: N
  credits:
    Developed by Sepehr Ramezani, Brian Brady, Valorie Smith, Hwan Choi @ REAL LAb University of Central Florida.
  Ground
  BodySet:
    Body RightShank: mass=0.4490202 [kg] mass_center=(-0.003090581 0.01140705 -0.005057314)
        inertia=(0.005289509 0.0005189052 0.005426893 9.104872e-5 3.437645e-6 0.000154751)
      PhysicalOffsetFrame AFO_Top_frame: socket_parent=.. translation=(-0.06555777 -0.1919906 0.06555777) [meters]
          orientation=(0 1.54 0) [radians] meshes=ADDS_Leg5.stl
    Body rightfoot: mass=0.9480485 mass_center=(0.02496703 -0.05732791 0.004987522)
        inertia=(0.001424925 0.002175776 0.002826486 -0.0006998101 0.000147869 -0.0001322765)
      PhysicalOffsetFrame AFO_frame: socket_parent=.. translation=(-0.07288645 -0.1166183 -0.04373187)
          meshes=AADS_Foot5.stl
  JointSet:
    FreeJoint ShankToground: socket_parent_frame=ground_offset socket_child_frame=Shank_offset
      Coordinate Shank_rx: default_value=0 range=(-3.14 3.14)
      Coordinate Shank_ry: default_value=0 range=(-3.14 3.14)
      Coordinate Shank_rz: default_value=0 range=(-3.14 3.14)
      Coordinate Shank_tx: default_value=0 range=(-1 1)
      Coordinate Shank_ty: default_value=0.4 range=(-1 1)
      Coordinate Shank_tz: default_value=0 range=(-1 1)
      PhysicalOffsetFrame ground_offset: socket_parent=/ground translation=(0 0 0)
      PhysicalOffsetFrame Shank_offset: socket_parent=/bodyset/RightShank translation=(0 0 0)
    PinJoint RFootToRShank: socket_parent_frame=RightShank_offset socket_child_frame=rightfoot_offset
      Coordinate Rfoot_rz: default_value=0 range=(-1.745329 1.745329)
      PhysicalOffsetFrame RightShank_offset: socket_parent=/bodyset/RightShank translation=(0 -0.1779425 0)
      PhysicalOffsetFrame rightfoot_offset: socket_parent=/bodyset/rightfoot translation=(0 0 0)
  MarkerSet:
    Marker LateralKnee: RightShank (-0.003073505 0.1821947 0.03952849)
    Marker MedialKnee: RightShank (0.002169801 0.1823159 -0.03707337)
    Marker Heel: rightfoot (-0.06525071 -0.06623582 0.004223343)
    Marker SpringTop: RightShank (-0.05393788 -0.09691074 0.005852611)
    Marker Toe: rightfoot (0.1765703 -0.06575897 -0.004545138)
    Marker MP5: rightfoot (0.1039696 -0.07149314 0.05920315)
    Marker Shank: RightShank (0.06458695 -0.01490599 -0.006504104)
    Marker LMAL: RightShank (-0.004518442 -0.1721553 0.05986381)
    Marker MMAL: RightShank (-0.004903465 -0.1744175 -0.06241504)
