# OpenSim document version 30000
ForceSet LowerBodyReserveActuators:
  defaults:
    CoordinateActuator default: optimal_force=100
    PointActuator default: point=(0 0 0) point_is_global=false force_is_global=true optimal_force=100
    TorqueActuator default: torque_is_global=true optimal_force=100
  PointActuator FX: body=RightShank point=(0 0 0) direction=(1 0 0) optimal_force=100
  PointActuator FY: body=RightShank point=(0 0 0) direction=(0 1 0) optimal_force=100
  PointActuator FZ: body=RightShank point=(0 0 0) direction=(0 0 1) optimal_force=100
  TorqueActuator MY: bodyA=RightShank bodyB=ground axis=(0 1 0) optimal_force=100
  TorqueActuator MZ: bodyA=RightShank bodyB=ground axis=(0 0 1) optimal_force=100
  TorqueActuator MX: bodyA=RightShank bodyB=ground axis=(1 0 0) optimal_force=100
  CoordinateActuator ankle_angle_r_reserve: coordinate=Rfoot_rz optimal_force=100
