# OpenSim document version 40000
InverseKinematicsTool:
  time_range: 0 13.01
  output_motion_file: IK\IK.mot
  marker_file: Data\Trial.trc
  IKTaskSet:
    IKMarkerTask Heel: apply=true weight=2
    IKMarkerTask SpringTop: apply=true weight=2
    IKMarkerTask Toe: apply=true weight=1
    IKMarkerTask MP5: apply=true weight=1
    IKMarkerTask Shank: apply=false weight=1
    IKMarkerTask LMAL: apply=true weight=2
    IKMarkerTask MMAL: apply=true weight=2
    IKMarkerTask Foot: apply=false weight=1
