# OpenSim document version 40000
InverseKinematicsTool:
  results_directory: ./
  constraint_weight: Inf
  accuracy: 1e-5
  marker_file: 10lbsSpring1.trc
  time_range: 0 9.52
  report_errors: true
  output_motion_file: C:\Users\brbra\Documents\AADS Test\Trials\ABSTRACT\10lbspring\Trial_1\IK_10lbsSpring1_new.mot
  report_marker_locations: false
  IKTaskSet:
    IKMarkerTask LateralKnee: apply=true weight=1
    IKMarkerTask MedialKnee: apply=true weight=1
    IKMarkerTask Heel: apply=true weight=2
    IKMarkerTask SpringTop: apply=false weight=1
    IKMarkerTask Toe: apply=true weight=2
    IKMarkerTask MP5: apply=true weight=1
    IKMarkerTask Shank: apply=false weight=1
    IKMarkerTask LMAL: apply=true weight=1
    IKMarkerTask MMAL: apply=true weight=1
