# OpenSim document version 40000
ScaleTool DynamicWalkerModel-scaled:
  mass: 1.39708 [kg]
  height: -1
  age: -1
  ModelScaler:
    apply: true
    scaling_order: measurements
    marker_file: ABSTRACT/0lbsSpring/Static.trc
    time_range: 0 0.03
    preserve_mass_distribution: false
    MeasurementSet:
      Measurement RightShank: apply=true
        MarkerPair: markers=(LateralKnee LMAL)
        MarkerPair: markers=(MedialKnee MMAL)
        BodyScale RightShank: axes=(X Y Z)
      Measurement RightFoot: apply=true
        MarkerPair: markers=(Heel Toe)
        MarkerPair: markers=(Heel MP5)
        BodyScale rightfoot: axes=(X Y Z)
  MarkerPlacer:
    apply: true
    marker_file: ABSTRACT/0lbsSpring/Static.trc
    time_range: 0 0.03
    max_marker_movement: -1
    IKTaskSet:
      IKMarkerTask LateralKnee: apply=true weight=1
      IKMarkerTask MedialKnee: apply=true weight=1
      IKMarkerTask Heel: apply=true weight=2
      IKMarkerTask SpringTop: apply=false weight=1
      IKMarkerTask Toe: apply=true weight=2
      IKMarkerTask MP5: apply=true weight=1
      IKMarkerTask Shank: apply=false weight=1
      IKMarkerTask LMAL: apply=true weight=1
      IKMarkerTask MMAL: apply=true weight=1
