# OpenSim document version 30000
CMC_TaskSet cmc_tasks:
  defaults: CMC_Joint default: weight=1 wrt_body=-1 express_body=-1 active=(true false false) kp=(100 1 1) kv=(60 1 1)
      ka=(1 1 1) r0=(0 0 0) r1=(0 0 0) r2=(0 0 0) limit=0
  # Pelvis.
  CMC_Joint Shank_tx: weight=1 coordinate=Shank_tx
  CMC_Joint Shank_ty: weight=1 coordinate=Shank_ty
  CMC_Joint Shank_tz: weight=1 coordinate=Shank_tz
  CMC_Joint Shank_rx: weight=1 coordinate=Shank_rx
  CMC_Joint Shank_ry: weight=1 coordinate=Shank_ry
  CMC_Joint Shank_rz: weight=1 coordinate=Shank_rz
  # Lower limbs.
  CMC_Joint Rfoot_rz: weight=2 kp=(20 1 1) kv=(100 1 1) ka=(1 1 1) r0=(0 0 0) r1=(0 0 0) r2=(0 0 0) coordinate=Rfoot_rz
