# OpenSim document version 40000
ControlSet subject01:
  ControlLinear [values shared by the 77 below unless stated]: is_model_control=true extrapolate=true default_min=0.02
      default_max=1 filter_on=false use_steps=true kp=100 kv=20
  ControlLinear glut_med1_r.excitation:
    x_nodes:
      ControlLinearNode: t=0.93 value=0.5411737
      ControlLinearNode: t=0.94 value=0.601788
  ControlLinear glut_med2_r.excitation:
    x_nodes:
      ControlLinearNode: t=0.93 value=0.3991842
      ControlLinearNode: t=0.94 value=0.429959
  ControlLinear glut_med3_r.excitation:
    x_nodes:
      ControlLinearNode: t=0.93 value=0.2623985
      ControlLinearNode: t=0.94 value=0.3257683
  ControlLinear bifemlh_r.excitation:
    x_nodes:
      ControlLinearNode: t=0.93 value=0.02
      ControlLinearNode: t=0.94 value=0.02
  ControlLinear bifemsh_r.excitation:
    x_nodes:
      ControlLinearNode: t=0.93 value=0.02
      ControlLinearNode: t=0.94 value=0.1057473
  ControlLinear sar_r.excitation:
    x_nodes:
      ControlLinearNode: t=0.93 value=0.02
      ControlLinearNode: t=0.94 value=0.06764613
  ControlLinear add_mag2_r.excitation:
    x_nodes:
      ControlLinearNode: t=0.93 value=0.02
      ControlLinearNode: t=0.94 value=0.02
  ControlLinear tfl_r.excitation:
    x_nodes:
      ControlLinearNode: t=0.93 value=0.02
      ControlLinearNode: t=0.94 value=0.2506279
  ControlLinear pect_r.excitation:
    x_nodes:
      ControlLinearNode: t=0.93 value=0.02
      ControlLinearNode: t=0.94 value=0.02
  ControlLinear grac_r.excitation:
    x_nodes:
      ControlLinearNode: t=0.93 value=0.02
      ControlLinearNode: t=0.94 value=0.02
  ControlLinear glut_max1_r.excitation:
    x_nodes:
      ControlLinearNode: t=0.93 value=0.148701
      ControlLinearNode: t=0.94 value=0.022
  ControlLinear glut_max2_r.excitation:
    x_nodes:
      ControlLinearNode: t=0.93 value=0.1440052
      ControlLinearNode: t=0.94 value=0.02
  ControlLinear glut_max3_r.excitation:
    x_nodes:
      ControlLinearNode: t=0.93 value=0.02
      ControlLinearNode: t=0.94 value=0.02
  ControlLinear iliacus_r.excitation:
    x_nodes:
      ControlLinearNode: t=0.93 value=0.02
      ControlLinearNode: t=0.94 value=0.02350381
  ControlLinear psoas_r.excitation:
    x_nodes:
      ControlLinearNode: t=0.93 value=0.02
      ControlLinearNode: t=0.94 value=0.03050111
  ControlLinear quad_fem_r.excitation:
    x_nodes:
      ControlLinearNode: t=0.93 value=0.02
      ControlLinearNode: t=0.94 value=0.02
  ControlLinear gem_r.excitation:
    x_nodes:
      ControlLinearNode: t=0.93 value=0.02
      ControlLinearNode: t=0.94 value=0.02
  ControlLinear peri_r.excitation:
    x_nodes:
      ControlLinearNode: t=0.93 value=0.022
      ControlLinearNode: t=0.94 value=0.0713342
  ControlLinear rect_fem_r.excitation:
    x_nodes:
      ControlLinearNode: t=0.93 value=0.02
      ControlLinearNode: t=0.94 value=0.04219368
  ControlLinear vas_int_r.excitation:
    x_nodes:
      ControlLinearNode: t=0.93 value=0.04455471
      ControlLinearNode: t=0.94 value=0.02
  ControlLinear med_gas_r.excitation:
    x_nodes:
      ControlLinearNode: t=0.93 value=0.02
      ControlLinearNode: t=0.94 value=0.2266714
  ControlLinear soleus_r.excitation:
    x_nodes:
      ControlLinearNode: t=0.93 value=0.02
      ControlLinearNode: t=0.94 value=0.02
  ControlLinear tib_post_r.excitation:
    x_nodes:
      ControlLinearNode: t=0.93 value=0.02
      ControlLinearNode: t=0.94 value=0.02
  ControlLinear tib_ant_r.excitation:
    x_nodes:
      ControlLinearNode: t=0.93 value=0.3420442
      ControlLinearNode: t=0.94 value=0.02
  ControlLinear glut_med1_l.excitation:
    x_nodes:
      ControlLinearNode: t=0.93 value=0.02
      ControlLinearNode: t=0.94 value=0.03033716
  ControlLinear glut_med2_l.excitation:
    x_nodes:
      ControlLinearNode: t=0.93 value=0.02
      ControlLinearNode: t=0.94 value=0.02459364
  ControlLinear glut_med3_l.excitation:
    x_nodes:
      ControlLinearNode: t=0.93 value=0.02
      ControlLinearNode: t=0.94 value=0.02984026
  ControlLinear bifemlh_l.excitation:
    x_nodes:
      ControlLinearNode: t=0.93 value=0.02
      ControlLinearNode: t=0.94 value=0.02
  ControlLinear bifemsh_l.excitation:
    x_nodes:
      ControlLinearNode: t=0.93 value=0.07212982
      ControlLinearNode: t=0.94 value=0.08959162
  ControlLinear sar_l.excitation:
    x_nodes:
      ControlLinearNode: t=0.93 value=0.06448297
      ControlLinearNode: t=0.94 value=0.1003431
  ControlLinear add_mag2_l.excitation:
    x_nodes:
      ControlLinearNode: t=0.93 value=0.03246423
      ControlLinearNode: t=0.94 value=0.02
  ControlLinear tfl_l.excitation:
    x_nodes:
      ControlLinearNode: t=0.93 value=0.02
      ControlLinearNode: t=0.94 value=0.3266289
  ControlLinear pect_l.excitation:
    x_nodes:
      ControlLinearNode: t=0.93 value=0.07356734
      ControlLinearNode: t=0.94 value=0.022
  ControlLinear grac_l.excitation:
    x_nodes:
      ControlLinearNode: t=0.93 value=0.0411958
      ControlLinearNode: t=0.94 value=0.02
  ControlLinear glut_max1_l.excitation:
    x_nodes:
      ControlLinearNode: t=0.93 value=0.02
      ControlLinearNode: t=0.94 value=0.02
  ControlLinear glut_max2_l.excitation:
    x_nodes:
      ControlLinearNode: t=0.93 value=0.02
      ControlLinearNode: t=0.94 value=0.02
  ControlLinear glut_max3_l.excitation:
    x_nodes:
      ControlLinearNode: t=0.93 value=0.02
      ControlLinearNode: t=0.94 value=0.02
  ControlLinear iliacus_l.excitation:
    x_nodes:
      ControlLinearNode: t=0.93 value=0.2767342
      ControlLinearNode: t=0.94 value=0.022
  ControlLinear psoas_l.excitation:
    x_nodes:
      ControlLinearNode: t=0.93 value=0.2620939
      ControlLinearNode: t=0.94 value=0.022
  ControlLinear quad_fem_l.excitation:
    x_nodes:
      ControlLinearNode: t=0.93 value=0.1375755
      ControlLinearNode: t=0.94 value=0.02
  ControlLinear gem_l.excitation:
    x_nodes:
      ControlLinearNode: t=0.93 value=0.03126647
      ControlLinearNode: t=0.94 value=0.022
  ControlLinear peri_l.excitation:
    x_nodes:
      ControlLinearNode: t=0.93 value=0.02
      ControlLinearNode: t=0.94 value=0.05563674
  ControlLinear rect_fem_l.excitation:
    x_nodes:
      ControlLinearNode: t=0.93 value=0.03285875
      ControlLinearNode: t=0.94 value=0.1203494
  ControlLinear vas_int_l.excitation:
    x_nodes:
      ControlLinearNode: t=0.93 value=0.02
      ControlLinearNode: t=0.94 value=0.02
  ControlLinear med_gas_l.excitation:
    x_nodes:
      ControlLinearNode: t=0.93 value=0.02
      ControlLinearNode: t=0.94 value=0.02
  ControlLinear soleus_l.excitation:
    x_nodes:
      ControlLinearNode: t=0.93 value=0.02
      ControlLinearNode: t=0.94 value=0.02
  ControlLinear tib_post_l.excitation:
    x_nodes:
      ControlLinearNode: t=0.93 value=0.02
      ControlLinearNode: t=0.94 value=0.02
  ControlLinear tib_ant_l.excitation:
    x_nodes:
      ControlLinearNode: t=0.93 value=0.07210923
      ControlLinearNode: t=0.94 value=0.1480209
  ControlLinear ercspn_r.excitation:
    x_nodes:
      ControlLinearNode: t=0.93 value=0.022
      ControlLinearNode: t=0.94 value=0.02690898
  ControlLinear ercspn_l.excitation:
    x_nodes:
      ControlLinearNode: t=0.93 value=0.1922857
      ControlLinearNode: t=0.94 value=0.1818814
  ControlLinear intobl_r.excitation:
    x_nodes:
      ControlLinearNode: t=0.93 value=0.02
      ControlLinearNode: t=0.94 value=0.02
  ControlLinear intobl_l.excitation:
    x_nodes:
      ControlLinearNode: t=0.93 value=0.02
      ControlLinearNode: t=0.94 value=0.02500638
  ControlLinear extobl_r.excitation:
    x_nodes:
      ControlLinearNode: t=0.93 value=0.02
      ControlLinearNode: t=0.94 value=0.02
  ControlLinear extobl_l.excitation:
    x_nodes:
      ControlLinearNode: t=0.93 value=0.02
      ControlLinearNode: t=0.94 value=0.02
  ControlLinear FX.excitation: default_min=-10000 default_max=10000 use_steps=false
    x_nodes:
      ControlLinearNode: t=0.93 value=2.641223
      ControlLinearNode: t=0.94 value=1.574179
  ControlLinear FY.excitation: default_min=-10000 default_max=10000 use_steps=false
    x_nodes:
      ControlLinearNode: t=0.93 value=-2.300545
      ControlLinearNode: t=0.94 value=-2.378459
  ControlLinear FZ.excitation: default_min=-10000 default_max=10000 use_steps=false
    x_nodes:
      ControlLinearNode: t=0.93 value=2.248493
      ControlLinearNode: t=0.94 value=2.161415
  ControlLinear MX.excitation: default_min=-10000 default_max=10000 use_steps=false
    x_nodes:
      ControlLinearNode: t=0.93 value=-1.009437
      ControlLinearNode: t=0.94 value=-0.1755564
  ControlLinear MY.excitation: default_min=-10000 default_max=10000 use_steps=false
    x_nodes:
      ControlLinearNode: t=0.93 value=-2.035254
      ControlLinearNode: t=0.94 value=-1.244891
  ControlLinear MZ.excitation: default_min=-10000 default_max=10000 use_steps=false
    x_nodes:
      ControlLinearNode: t=0.93 value=-5.549677
      ControlLinearNode: t=0.94 value=-5.281269
  ControlLinear hip_flexion_r_reserve.excitation: default_min=-10000 default_max=10000 use_steps=false
    x_nodes:
      ControlLinearNode: t=0.93 value=-0.003157972
      ControlLinearNode: t=0.94 value=0.0009482748
  ControlLinear hip_adduction_r_reserve.excitation: default_min=-10000 default_max=10000 use_steps=false
    x_nodes:
      ControlLinearNode: t=0.93 value=-0.0106037
      ControlLinearNode: t=0.94 value=-0.01294238
  ControlLinear hip_rotation_r_reserve.excitation: default_min=-10000 default_max=10000 use_steps=false
    x_nodes:
      ControlLinearNode: t=0.93 value=0.005400568
      ControlLinearNode: t=0.94 value=0.003082551
  ControlLinear knee_angle_r_reserve.excitation: default_min=-10000 default_max=10000 use_steps=false
    x_nodes:
      ControlLinearNode: t=0.93 value=0.0002161159
      ControlLinearNode: t=0.94 value=-0.003769582
  ControlLinear ankle_angle_r_reserve.excitation: default_min=-10000 default_max=10000 use_steps=false
    x_nodes:
      ControlLinearNode: t=0.93 value=6.3861
      ControlLinearNode: t=0.94 value=-0.949831
  ControlLinear subtalar_angle_r_reserve.excitation: default_min=-10000 default_max=10000 use_steps=false
    x_nodes:
      ControlLinearNode: t=0.93 value=-21.38221
      ControlLinearNode: t=0.94 value=-17.84678
  ControlLinear mtp_angle_r_reserve.excitation: default_min=-10000 default_max=10000 use_steps=false
    x_nodes:
      ControlLinearNode: t=0.93 value=0.03839724
      ControlLinearNode: t=0.94 value=0.03736177
  ControlLinear hip_flexion_l_reserve.excitation: default_min=-10000 default_max=10000 use_steps=false
    x_nodes:
      ControlLinearNode: t=0.93 value=0.006507693
      ControlLinearNode: t=0.94 value=0.005778092
  ControlLinear hip_adduction_l_reserve.excitation: default_min=-10000 default_max=10000 use_steps=false
    x_nodes:
      ControlLinearNode: t=0.93 value=0.002492045
      ControlLinearNode: t=0.94 value=-0.00429618
  ControlLinear hip_rotation_l_reserve.excitation: default_min=-10000 default_max=10000 use_steps=false
    x_nodes:
      ControlLinearNode: t=0.93 value=-0.005700221
      ControlLinearNode: t=0.94 value=-0.001440661
  ControlLinear knee_angle_l_reserve.excitation: default_min=-10000 default_max=10000 use_steps=false
    x_nodes:
      ControlLinearNode: t=0.93 value=-0.003897825
      ControlLinearNode: t=0.94 value=-0.004180709
  ControlLinear ankle_angle_l_reserve.excitation: default_min=-10000 default_max=10000 use_steps=false
    x_nodes:
      ControlLinearNode: t=0.93 value=1.996341
      ControlLinearNode: t=0.94 value=2.000874
  ControlLinear subtalar_angle_l_reserve.excitation: default_min=-10000 default_max=10000 use_steps=false
    x_nodes:
      ControlLinearNode: t=0.93 value=-6.368875
      ControlLinearNode: t=0.94 value=-6.420736
  ControlLinear mtp_angle_l_reserve.excitation: default_min=-10000 default_max=10000 use_steps=false
    x_nodes:
      ControlLinearNode: t=0.93 value=0.0330529
      ControlLinearNode: t=0.94 value=0.03320111
  ControlLinear lumbar_extension_reserve.excitation: default_min=-10000 default_max=10000 use_steps=false
    x_nodes:
      ControlLinearNode: t=0.93 value=0.001726628
      ControlLinearNode: t=0.94 value=0.001693753
  ControlLinear lumbar_bending_reserve.excitation: default_min=-10000 default_max=10000 use_steps=false
    x_nodes:
      ControlLinearNode: t=0.93 value=-6.907566e-5
      ControlLinearNode: t=0.94 value=-0.0009422437
  ControlLinear lumbar_rotation_reserve.excitation: default_min=-10000 default_max=10000 use_steps=false
    x_nodes:
      ControlLinearNode: t=0.93 value=-0.002638717
      ControlLinearNode: t=0.94 value=-5.156178e-5
